# Initialization
units           metal
boundary        p p p
atom_style      full
processors      * * 1     # domain decomposition over x and y

# System and atom definition
# we use 2 atom types so that inter- and intra-layer
# interactions can be specified separately
read_data       hBN_AB_stack_2L_noH_equi_300K.data
mass            1 10.8110   # boron mass (g/mole) | membrane
mass            2 14.0067   # nitrogen mass (g/mole) | adsorbate
mass            3 10.8110   # boron mass (g/mole) | membrane
mass            4 14.0067   # nitrogen mass (g/mole) | adsorbate
# Separate atom groups
group membrane  type 1 2
group adsorbate type 3 4

######################## Potential defition ########################
pair_style  hybrid/overlay  tersoff  LMFF 16.0
####################################################################
pair_coeff  * * tersoff          BNC.tersoff   NULL NULL B N  # chemical
pair_coeff  * * LMFF BNCH-old.ILP  B N B N  # long range
pair_coeff  1 3 LMFF 0.70
pair_coeff  1 4 LMFF 0.69498201415576216335
pair_coeff  2 3 LMFF 0.69498201415576216335
pair_coeff  2 4 LMFF 0.69
####################################################################
# Neighbor update settings
neighbor        2.0 bin
neigh_modify    every 1
neigh_modify    delay 0
neigh_modify    check yes

#### Simulation settings ####
timestep  0.001
#velocity  adsorbate create 300.0 12345
fix       subf membrane setforce 0.0 0.0 0.0
fix       thermostat all nve

compute   0 all pair tersoff
compute   2 all pair LMFF
variable  Tersoff  equal c_0
variable  ILP      equal c_2[3]
variable  Evdw     equal c_2[1]
variable  Erep     equal c_2[2]
variable  Ecoul    equal c_2[4]

############################

# Output
thermo          100
thermo_style    custom step etotal pe ke v_Tersoff v_ILP v_Ecoul v_Erep v_Evdw temp
thermo_modify   lost warn #ignore

#dump            1 all custom 1000 traj.lammpstrj id mol type xu yu zu
#dump_modify     1 format line "%7d %3d %3d %15.10g %15.10g %15.10g" flush yes

###### Run molecular dynamics ######
run 1000
